** Full model for BESO (FCStd pipeline)
*Heading
Model: examples/beso from FCStd + Gmsh volume mesh
**
*Node, NSET=Nall
1, -2986.552986266, 23697.1412862, 12000.0
2, -2986.552986266, 23697.1412862, -14000.0
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**
** Volume elements
*Element, TYPE=C3D4, Elset=design_space
2432, 1186, 247, 277, 1217
2433, 1016, 1013, 1152, 1215
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**
*Nset, Nset=bottom_fix
2, 3, 5, 8, 12, 13
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**
** Materials (MPa, t/mm^3) — 全设计域单材料
*Material, Name=Material-design
*Elastic
200000.0, 0.27
*Density
7.833e-09
**
*Solid section, Elset=design_space, Material=Material-design
**
*Step
*Static
**
*Boundary, op=NEW
*Boundary
bottom_fix, 1, 1, 0
bottom_fix, 2, 2, 0
bottom_fix, 3, 3, 0
**
*Cload, op=NEW
*Cload
1122, 3, -281000.0
**
*Node file
RF, U
*El file
S
*End step
