** Full model for BESO (FCStd pipeline + FEM BC remap)
*Heading
Model: volume mesh + boundary/CLOAD remapped from FEM reference INP
**
*Node, NSET=Nall
1, -2986.5529862660, 23697.1412862000, 12000.0000000000
2, -2986.5529862660, 23697.1412862000, -14000.0000000000
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**
** Volume elements
*Element, TYPE=C3D4, Elset=design_space
2432, 1186, 247, 277, 1217
2444, 1171, 287, 1165, 1255
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*Element, TYPE=C3D4, Elset=nondesign_space
2433, 1016, 1013, 1152, 1215
2434, 1152, 849, 1016, 1215
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**
*Nset, Nset=bottom_fix
2, 3, 5, 8, 12, 13
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**
** Materials (MPa, t/mm^3)
*Material, Name=Material-design
*Elastic
200000.0, 0.27
*Density
7.833e-09
*Material, Name=Material-nondesign
*Elastic
200000.0, 0.27
*Density
7.833e-09
**
*Solid section, Elset=design_space, Material=Material-design
*Solid section, Elset=nondesign_space, Material=Material-nondesign
**
*Step
*Static
**
*Boundary, op=NEW
*Boundary
** bottom_fix fallback (FEM 无有效固定集或显式关闭仅 FEM 固定时)
bottom_fix, 1, 1, 0
bottom_fix, 2, 2, 0
bottom_fix, 3, 3, 0
**
*Cload, op=NEW
*Cload
14, 3, 0.0
154, 3, 0.0
158, 3, 153867.2179814
159, 3, 151177.4464519
160, 3, 151813.6147533
164, 3, 0.0
1122, 3, 0.0
1126, 3, 0.0
1128, 3, 0.0
1130, 3, 313577.636308
1131, 3, 290053.0238347
**
*Node file
RF, U
*El file
S
*End step
