*Node, NSET=Nall
1, 0, 0, 0
2, 0, 30, 0
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*Element, TYPE=S4, ELSET=Eall
261, 347, 435, 632, 343
262, 632, 836, 868, 739
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

***********************************************************
** Element sets for materials and FEM element type (solid, shell, beam, fluid)
** written by write_element_sets_material_and_femelement_type function

** Added ELSETs by optimization:
*ELSET,ELSET=SolidMaterialElementGeometry2D0
267, 268, 269, 270, 271, 272
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*ELSET,ELSET=SolidMaterialElementGeometry2D1
261, 262, 263, 264, 265, 266
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
*ELSET,ELSET=SolidMaterialElementGeometry2D
Eall

***********************************************************
** Node sets for prescribed displacement constraint
** written by write_node_sets_constraints_displacement function
** FemConstraintDisplacement
*NSET,NSET=FemConstraintDisplacement
1,
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** FemConstraintDisplacement001
*NSET,NSET=FemConstraintDisplacement001
3,

***********************************************************
** Materials
** written by write_materials function
** Young's modulus unit is MPa = N/mm2
** FreeCAD material name: CalculiX-Steel
** SolidMaterial
*MATERIAL, NAME=SolidMaterial
*ELASTIC
210000, 0.300

***********************************************************
** Sections
** written by write_femelementsets function
*SHELL SECTION, ELSET=SolidMaterialElementGeometry2D, MATERIAL=SolidMaterial
1

***********************************************************
** At least one step is needed to run an CalculiX analysis of FreeCAD
** written by write_step_begin function

** Materials and sections in optimized domains
** (redefines elements properties defined above):
*MATERIAL, NAME=SolidMaterialElementGeometry2D0
*ELASTIC
210000e-6,  0.3
*SHELL SECTION, ELSET=SolidMaterialElementGeometry2D0, MATERIAL=SolidMaterialElementGeometry2D0, OFFSET=0.0
1.0

*MATERIAL, NAME=SolidMaterialElementGeometry2D1
*ELASTIC
210000,  0.3
*SHELL SECTION, ELSET=SolidMaterialElementGeometry2D1, MATERIAL=SolidMaterialElementGeometry2D1, OFFSET=0.0
1.0

*STEP
*STATIC


***********************************************************
** Displacement constraint applied
** written by write_constraints_displacement function
** FemConstraintDisplacement
*BOUNDARY
FemConstraintDisplacement,1
FemConstraintDisplacement,3
** FemConstraintDisplacement001
*BOUNDARY
FemConstraintDisplacement001,2
FemConstraintDisplacement001,3


***********************************************************
** Node loads Constraints
** written by write_constraints_force function
*CLOAD
** FemConstraintForce
** node load on shape: Plane:Vertex2
2,2,-1.0000000000000E+02


***********************************************************
** Outputs --> frd file
** written by write_outputs_types function

*EL PRINT, ELSET=SolidMaterialElementGeometry2D
ENER
*EL PRINT, ELSET=SolidMaterialElementGeometry2D
S

** outputs --> dat file
***********************************************************
** written by write_step_end function
*END STEP

***********************************************************
** CalculiX Input file
** written by write_footer function
**   written by    --> FreeCAD 0.17.10993 (Git)
**   written on    --> Mon May 08 16:00:29 2017
**   file name     -->
**   analysis name --> Analysis
**
**
**
**   Units
**
**   Geometry (mesh data)        --> mm
**   Materials (Young's modulus) --> N/mm2 = MPa
**   Loads (nodal loads)         --> N
**
